c := 3*10^8
i := sqrt(-1)
f_пр1 := 43.5*10^9
f_пр2 := 44.5*10^9
f_пр := (f_пр1 + f_пр2)/2
f_пер1 := 20.2*10^9
f_пер2 := 22.2*10^9
f_пер := (f_пер1 + f_пер2)/2
λ_пр1 := c/f_пр1
λ_пр2 := c/f_пр2
λ_пр := c/f_пр
λ_пер1 := c/f_пер1
λ_пер2 := c/f_пер2
λ_пер := c/f_пер
λ_пр1 = 0.00689655
λ_пр2 = 0.00674157
λ_пр = 0.00681818
λ_пер1 = 0.0148515
λ_пер2 = 0.0135135
λ_пер = 0.0141509
# Независимые геометрические параметры антенны:
# D0 | d0 | ψ0 | φ1 | φ2
# Пусть
D0 := 3.2
d0 := 15*λ_пр1 = 0.103448
D0/d0 = 30.9333
ψ0 := 60*deg = 1.0472
φ2 := 5 deg = 0.0872665
# Предварительная оценка КУ:
φ2 == 2*atan(d0/D0*tan(ψ0/2)^2)/deg
# КИП
k := 0.5
D0 = 3.2
λ_пр1 = 0.00689655
4*F/d0 == Fэ/F == ρ0/f == (e + 1)/(e - 1)
D := 9.996 + 20*log(D0/λ_пр1) + 10*log(k) = 60.3161
# Формулы, характеризующие геометрию:
tg(φ1/2) == ((e - 1)/(e + 1))^2
d0/D0 == (ex - 1)/(ex + 1)*cot(ψ0/2)
4*F == D0*cot(ψ0/2) solve, F → 1.386
F := 1.386
ex == sin((ψ0 + φ2)/2)/sin((ψ0 - φ2)/2) solve, ex → 1.164
h := D0/2*(1/2*cot(ψ0/2) - cot(ψ0)) = 0.46188
α := 4*h/D0^2 = 0.180422
f == d0/4*cos((ψ0 + φ2)/2)/(sin(ψ0/2)*cos(φ2/2)) solve, f → 0.044
f := 0.044
1/(16*F) = 0.0450938
2*C == d0/2*sin(ψ0 + φ2)/(sin(ψ0)*sin(φ2)) solve, C → 0.311
C := 0.311
2*a == d0/2*(1/sin(φ2) - 1/sin(ψ0)) solve, a → 0.267
a := 0.267
# Эксцентриситет
ex := C/a = 1.16479
tan(φ1/2) == ((ex - 1)/(ex + 1))^2 solve, φ1 → 0.012  # Расстояние между фокусами (проверка):
2*C == 2*a + 2*f
(2*C - 2*a)/2 = 0.044
0.012/deg = 0.687549
φ1 := 0.688*deg
c_0 := sqrt(a^2/(C^2 - a^2)*(d0/2)^2 + a^2) = 0.280693
R := F - 2*C = 0.764
F - f = 1.342
atan(0.04704)/deg = 2.69321
# Диаграмма направленности облучателя - конического рупора:
λ_пр = 0.00681818
2*sin(22.5*deg)*80 = 61.2293
# Радиус волновода подбирается из условия передачи на низшем типе волн Н11:
λ_пер = 0.0141509
λ_пер1/3.41 < a_в < λ_пер1/2.61
λ_пер1/3.41 = 0.00435527
a_в := 5*10^-3
λ_пер1/2.61 = 0.00569022
# Длина волны в волноводе в плоскости Н:
λ_в := λ_пр1/sqrt(1 - (λ_пр1/(3.41*a_в))^2) = 0.00754099
# Диаграмма направленности рупора:
# Пусть:
Δ := 0.1
n := 1
A_р := 0.035
I(r) := (1 - Δ) + Δ*(1 - (r/A_р)^2)^n
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# Геометрия рупора:
(1 - cos(χ/2))/(2*sin(χ/2)) == 1/8*λ_пр1/(2*A_р) solve, χ → 2*π - 4*atan(5*10^24/(1.232*10^23))
χ := 2*π - 4*atan(5*10^24/(1.232*10^23)) = 0.0985401
0.099/deg = 5.67228
R_р := (A_р - a_в)/tan(χ) = 0.303459
L_p := A_р/tan(χ) = 0.354035
2*a + f = 0.578
F_0(θ, φ) := integral(integral(I(r)*r*e^(i*2*π/λ_пр1*r*sin(θ)*cos(φ - ϕ)), r = 0 .. A_р), ϕ = 0 .. 2*π)
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# Заменим двухзеркальную антенну эквивалентной однозеркальной.
# Будем использовать апертурный метод для расчёта ДН:
F_э := F*(ex + 1)/(ex - 1) = 18.207
F = 1.386
ρ_э(φ) := 2*F_э/(1 + cos(φ))
R_з := D0/2
α(r) := 1/deg*atan(r/R_з/(F_э/R_з - (r/R_з)^2*R_з/(4*F_э)))
# Диаграммы направленности в плоскостях векторов Е и Н:
F_E(r) := 1/2*(1 + cos(deg*α(r)))*sin(π*A_р/λ_пр1*sin(0.8*deg*α(r)))/(π*A_р/λ_пр1*sin(0.8*deg*α(r)))
F_H(r) := 0.15*π^2*(0.67 + cos(deg*α(r)))*cos(π*A_р/λ_пр1*sin(deg*α(r)))/((π/2)^2 - (π*A_р/λ_пр1*sin(deg*α(r)))^2)
# Распределение амплитуды вдоль диаметра в плоскости Е:
A_E(r) := (1 + cos(deg*α(r)))/2*F_E(r)
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# Распределение амплитуды вдоль диаметра в плоскости Н:
A_H(r) := (1 + cos(deg*α(r)))/2*F_H(r)
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# Усреднённое распределение амплитуды вдоль радиуса:
A_ср(r) := (1 + cos(deg*α(r)))/4*(F_E(r) + F_H(r))
# Подбор параметров аппроксимирующей функции:
a0 := 0.25
p := 1
A_ср(r) := (1 + cos(deg*α(r)))/4*(F_0(deg*α(r), 0)/F_0(0, 0) + F_0(deg*α(r), π/2)/F_0(0, 0))
f(r) := a0 + (1 - a0)*(1 - (r/R_з)^2)^p
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# Расчёт КНД антенны
# КИП:
g := (1 - a0)*((2*p + 1)/(p + 1)^2) + a0 = 0.8125
S_эф := π*R_з^2*g
Dm := 4*π*S_эф/λ_пр1^2 = 1726470
10*log(Dm) = 62.3716
# Обобщённая координата
u(θ) := 2*π*R_з/λ_пр1*sin(θ*deg)
# Суммарная ДН:
F(θ) := |a0*2^1*1!*J1(u(θ))/u(θ)^1 + (1 - a0)*2^(p + 1)*(p + 1)!*Jn(p + 1, u(θ))/u(θ)^(p + 1)|
F_dB(θ) := 20*log(F(θ))
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# Ширина главного лепестка по уровню половинной мощности:
θ01 := -0.1
θ02 := 0.1
Given
-0.1 ≤ θ01 ≤ 0
0 ≤ θ02 ≤ 0.1
F_dB(θ01) == -3
F_dB(θ02) == -3
Θ := Find(θ01, θ02) = [-0.0737276; 0.0737276]
θ01 := Θ[0] = -0.0737276
θ02 := Θ[1] = 0.0737276
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Δθ_0.5 := θ02 - θ01 = 0.147455
# Уровень боковых лепестков:
θ_ξ := 0.2
Given
0.14 ≤ θ_ξ ≤ 0.3
θ_ξ := Maximize(F_dB, θ_ξ) = 0.235209
ξ := F_dB(θ_ξ) = -23.9384
# Уточнение КИП:
k == k_a*k_0*k_ф*k_п*k_д*k_з*k_и*k_с*k_у*k_т
k_a := 1.009
k_0 := 1.084
k_ф.log := 0.2
k_и.log := 0.2
k_п.log := 0.2
k_с.log := 0.1
k_д.log := 0.2
k_у.log := 0.1  # (считаем потери в защитном укрытии пренебрежимо малыми)
10*log(1.009) = 0.0389117
k_з.log := 0.2
k_т.log := 0.1
k_log := 10*log(k_a) + 10*log(k_0) + k_ф.log + k_п.log + k_д.log + k_з.log + k_и.log + k_с.log + k_у.log + k_т.log = 1.6892
k_a := 2*cot(φ2/2)^2*|integral(2*π*F(θ)*tan(θ/2), θ = 1/2 .. 5)|^2/(2*π*2*π*integral(|F(θ)|^2*sin(θ), θ = 0 .. π)) = 0.00900625
k_0 := integral(|F(θ)|^2*sin(θ), θ = φ1/deg .. 5)/integral(|F(θ)|^2*sin(θ), θ = 0 .. π) = 0.00108441
φ2/deg = 5
