G := 39  # Коэффициент усиления
x := 10
Given
9.96 + 20*log(x) - 3 == G
p := Find(x)
p = 39.9945  # Отношение диаметра главного зеркала к длине
c := 3*10^8
ν := 8.15*10^9
λ := c/ν = 0.0368098
D_0 := λ*p = 1.47219  # Диаметр главного зеркала
D_0 := 1.500
ψ_0 := 80*π/180
φ_2 := 8*π/180
F := 0.25*D_0*cot(ψ_0/2) = 0.446908  # Фокусное расстояние главного зеркала
e := sin((ψ_0 + φ_2)/2)/sin((ψ_0 - φ_2)/2) = 1.18182  # Эксцентриситет
d_0 := D_0*(e - 1)/(e + 1)*cot(ψ_0/2) = 0.148973  # Диаметр малого зеркала
f := d_0/4*cos((ψ_0 + φ_2)/2)/(sin(ψ_0/2)*cos(φ_2/2)) = 0.0417805  # Фокусное расстояние малого зеркала
a := d_0/4*(1/sin(φ_2) - 1/sin(ψ_0)) = 0.229786
2*a = 0.459572  # Расстояние между вершинами гипербалоида
C := d_0/4*sin(ψ_0 + φ_2)/(sin(ψ_0)*sin(φ_2)) = 0.271567
2*C = 0.543133  # Расстояние между фокусами гипербалоида
φ_1 := 30*π/180
Given
tan(φ_1/2) == ((e - 1)/(e + 1))^2
z := 180/π*Find(φ_1) → 2.50009156993/π = 0.795804  # Угол облучения источником краёв затенённой области раскрыва
# Проверка полученных результатов
4*F/d_0 = 11.9997
(e + 1)/(e - 1) = 11.9997
4*F = 1.78763
D_0*cot(ψ_0/2) = 1.78763
d_0/D_0 = 0.0993154
(e - 1)/(e + 1)*cot(ψ_0/2) = 0.0993154
# В соответствии с геометрией гиперболы: 2C = 2a + 2f
2*C = 0.543133
2*a + 2*f = 0.543133
# Эксцентриситет гиперболы: e = C/a >=1
e = 1.18182
C/a = 1.18182
# Проверка волновода
A := 0.0285
λ = 0.0368098
B := 0.0126
λ_кр := 2*A = 0.057  # Таким образом,  λ < λ_кр
A1 := 3*λ = 0.110429
B1 := 2*λ = 0.0736196  # Опорные значения (неверные)
# Расчёт размеров рупора
u_x := π*A1/λ*sin(φ_2)
u_y := π*B1/λ*sin(φ_2)  # Обобщённые угловые координаты
F_E := (1 + cos(φ_2))/2*sin(u_y)/u_y  # ДН рупора в плоскости Е
F_H := (π/2)^2*(1 + cos(φ_2))/2*cos(u_x)/((π/2)^2 - u_x^2)  # ДН рупора в плоскости Н
b1 := 10
Given
λ := 0.037
φ_2 := 8*π/180
20*log((1 + cos(φ_2))/2*sin(π*B1/λ*sin(φ_2))/(π*B1/λ*sin(φ_2))) == -10
B := Find(B1)  # Высота рупора
B = 0.195904
A1 := 0.05
φ_2 := 8*π/180
λ := 0.037
Given
20*log((π/2)^2*(1 + cos(φ_2))/2*cos(π*A1/λ*sin(φ_2))/((π/2)^2 - (π*A1/λ*sin(φ_2))^2)) == -10
A := Find(A1)
A = 0.270536  # Ширина рупора
# Эквивиалентный параболоид
# Фокусное расстояние эквивалентного зеркала
F_H(r) := 0.15*π^2*(0.67 + cos(α(r)))*cos(π*A/λ*sin(α(r)))/((π/2)^2 - (π*A/λ*sin(α(r)))^2)  # error: This variable is undefined.
F_э := F*((e + 1)/(e - 1)) = 5.36275
R := D_0/2 = 0.75  # Радиус эквивалентного зеркала
u_y(r) := π*B/λ*sin(r)
# Расчёт ДН облучателя
u_x(r) := π*A/λ*sin(r)
# ДН облучателя в плоскости Н
α(r) := atan(r/R/(F_э/R - (r/R)^2*R/(4*F_э)))  # ДН облучателя в плоскости Е
F_E(r) := 0.5*(1 + cos(r))*sin(u_y(r))/u_y(r)
α1 := 180/π*α(R)
α1 = 8
x(r) := 20*log(|F_E(r*π/180)|, 10)
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F_H(r) := (π/2)^2*(1 + cos(φ_2))/2*cos(u_x(r))/((π/2)^2 - u_x(r)^2)
y(r) := 20*log(|F_H(r*π/180)|, 10)
# Усреднённое распределение амплитуд
A_ср(r) := (1 + cos(α(r)))/4*(F_H(r) + F_E(r))
# Функция, аппроксимирующая распределение амплитуд
a_0 := 0.41
# Подобранные параметры:
p := 1.35
A_а(r) := a_0 + (1 - a_0)*(1 - (r/R)^2)^p
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# Расчёт ДН антенны
# Обобщённая угловая координата
u(θ) := 2*π*R/λ*sin(θ)
# Лямбда-функции
n := 0 .. 10
Λ_n(θ) := 2^n*n!*Jn(1, u(θ))/u(θ)^n
Λ_1(θ) := 2^1*1!*Jn(1, u(θ))/u(θ)^1
Λ_2(θ) := 2^3*3!*Jn(3, u(θ))/u(θ)^3
θ := -π, -π + 0.0001 .. π
E_Σ(θ) := a_0*Λ_1(θ) + (1 - a_0)*Λ_2(θ)
# ДН суммарного канала
F_Σ(θ) := 20*log(|E_Σ(θ)|)
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