θ := -π, -π + 0.0001 .. π
G := 37  # Коэффициент усиления
x := 10
Given
9.96 + 20*log(x) - 3 == G
p := Find(x)
p = 31.7687  # Отношение диаметра главного зеркала к длине
c := 3*10^8
ν := 8.15*10^9
λ := c/ν = 0.0368098
D_0 := λ*p = 1.1694  # Диаметр главного зеркала
ψ_0 := 85*π/180
φ_2 := 18.022*π/180
F := 0.25*D_0*cot(ψ_0/2) = 0.319044  # Фокусное расстояние главного зеркала
e := sin((ψ_0 + φ_2)/2)/sin((ψ_0 - φ_2)/2) = 1.41856
d_0 := 6*λ = 0.220859  # Диаметр малого зеркала
f := d_0/4*cos((ψ_0 + φ_2)/2)/(sin(ψ_0/2)*cos(φ_2/2)) = 0.0515003  # Фокусное расстояние малого зеркала
a := d_0/4*(1/sin(φ_2) - 1/sin(ψ_0)) = 0.123042
2*a = 0.246084  # Расстояние между вершинами гипербалоида
C := d_0/4*sin(ψ_0 + φ_2)/(sin(ψ_0)*sin(φ_2)) = 0.174542
2*C = 0.349085  # Расстояние между фокусами гипербалоида
φ_1 := 30*π/180
Given
tan(φ_1/2) == ((e - 1)/(e + 1))^2
z := 180/π*Find(φ_1) → 10.77882543/π = 3.43101  # Угол облучения источником краёв затенённой области раскрыва
# Проверка полученных результатов
4*F/d_0 = 5.77825
(e + 1)/(e - 1) = 5.77831
4*F = 1.27618
D_0*cot(ψ_0/2) = 1.27618
d_0/D_0 = 0.188865
(e - 1)/(e + 1)*cot(ψ_0/2) = 0.188863
# В соответствии с геометрией гиперболы: 2C = 2a + 2f
2*C = 0.349085
2*a + 2*f = 0.349085
# Эксцентриситет гиперболы: e = C/a >=1
e = 1.41856
C/a = 1.41856
# Проверка волновода
A := 0.0285
λ = 0.0368098
B := 0.0126
λ_кр := 2*A = 0.057  # Таким образом,  λ < λ_кр
A1 := 3*λ = 0.110429
B1 := 2*λ = 0.0736196  # Опорные значения (неверные)
# Расчёт размеров рупора
u_x := π*A1/λ*sin(φ_2)
u_y := π*B1/λ*sin(φ_2)  # Обобщённые угловые координаты
F_E := (1 + cos(φ_2))/2*sin(u_y)/u_y  # ДН рупора в плоскости Е
F_H := (π/2)^2*(1 + cos(φ_2))/2*cos(u_x)/((π/2)^2 - u_x^2)  # ДН рупора в плоскости Н
b1 := 10
Given
20*log((1 + cos(φ_2))/2*sin(π*B1/λ*sin(φ_2))/(π*B1/λ*sin(φ_2))) == -10
V := Find(B1)
V = 0.0871091  # Высота рупора
a1 := 10
Given
20*log((π/2)^2*(1 + cos(φ_2))/2*cos(π*A1/λ*sin(φ_2))/((π/2)^2 - (π*A1/λ*sin(φ_2))^2)) == -10
SH := Find(A1)
SH = 0.120208  # Ширина рупора
# Эквивиалентный параболоид
F_э := F*((e + 1)/(e - 1)) = 1.84354  # Фокусное расстояние эквивалентного зеркала
R := D_0/2 = 0.584701  # Радиус эквивалентного зеркала
# Расчёт ДН облучателя
α(r) := atan(r/R/(F_э/R - (r/R)^2*R/(4*F_э)))
α1 := 180/π*α(R)
α1 = 18.022
# ДН облучателя в плоскости Е
F_E(r) := 0.5*(1 + cos(α(r)))*sin(π*V/λ*sin(0.8*α(r)))/(π*V/λ*sin(0.8*α(r)))
# ДН облучателя в плоскости Н
F_H(r) := 0.15*π^2*(0.67 + cos(α(r)))*cos(π*SH/λ*sin(α(r)))/((π/2)^2 - (π*SH/λ*sin(α(r)))^2)
# Усреднённое распределение амплитуд
A_ср(r) := (1 + cos(α(r)))/4*(F_E(r) + F_H(r))
# Функция, аппроксимирующая распределение амплитуд
# Подобранные параметры:
a_0 := 0.41
p := 1.35
A_а(r) := a_0 + (1 - a_0)*(1 - (r/R)^2)^p
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# Расчёт ДН антенны
# Обобщённая угловая координата
u(θ) := 2*π*R/λ*sin(θ)
# Лямбда-функции
n := 0 .. 10
Λ_n(θ) := 2^n*n!*Jn(1, u(θ))/u(θ)^n
Λ_1(θ) := 2^1*1!*Jn(1, u(θ))/u(θ)^1
Λ_2(θ) := 2^3*3!*Jn(3, u(θ))/u(θ)^3
E_Σ(θ) := a_0*Λ_1(θ) + (1 - a_0)*Λ_2(θ)
# ДН суммарного канала
F_Σ(θ) := 20*log(|E_Σ(θ)|)
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