θ := -π, -π + 0.0001 .. π
G := 39  # Коэффициент усиления
x := 10
Given
9.96 + 20*log(x) - 3 == G
p := Find(x)
p = 39.9945  # Отношение диаметра главного зеркала к длине
c := 3*10^8
ν := 8.15*10^9
λ := c/ν = 0.0368098
D_0 := λ*p = 1.47219  # Диаметр главного зеркала
D_0 := 1.600  # Стандартный размер
D_0/λ = 43.4667
ψ_0 := 96*π/180
φ_2 := 25.58*π/180
F := 0.25*D_0*cot(ψ_0/2) = 0.360162  # Фокусное расстояние главного зеркала
e := sin((ψ_0 + φ_2)/2)/sin((ψ_0 - φ_2)/2) = 1.51383
d_0 := 8*λ = 0.294479  # Диаметр малого зеркала
f := d_0/4*cos((ψ_0 + φ_2)/2)/(sin(ψ_0/2)*cos(φ_2/2)) = 0.049575
# Фокусное расстояние малого зеркала
(e + 1)*d_0/(4*(e - 1)) = 0.360172
a := d_0/4*(1/sin(φ_2) - 1/sin(ψ_0)) = 0.0964811
2*a = 0.192962  # Расстояние между вершинами гипербалоида
C := d_0/4*sin(ψ_0 + φ_2)/(sin(ψ_0)*sin(φ_2)) = 0.146056
F + 2*C = 0.652274
2*C = 0.292112  # Расстояние между фокусами гипербалоида
ρ_0 := f*|(1 + e)/(1 - e)|
ρ_0 = 0.242537  # Расстояние от рупора до малого зеркала
F - 2*C = 0.0680495
F - (ρ_0 + (F - 2*C)) = 0.049575
φ_1 := 30*π/180
Given
tan(φ_1/2) == ((e - 1)/(e + 1))^2
z := 180/π*Find(φ_1) → 15.032051551/π = 4.78485  # Угол облучения источником краёв затенённой области раскрыва
# Проверка полученных результатов
4*F/d_0 = 4.8922
(e + 1)/(e - 1) = 4.89233
4*F = 1.44065
D_0*cot(ψ_0/2) = 1.44065
d_0/D_0 = 0.184049
(e - 1)/(e + 1)*cot(ψ_0/2) = 0.184044
2*atan(((e - 1)/(e + 1))^2)*180/π = 4.78485
# В соответствии с геометрией гиперболы: 2C = 2a + 2f
2*C = 0.292112
2*a + 2*f = 0.292112
# Эксцентриситет гиперболы: e = C/a >=1
e = 1.51383
C/a = 1.51383
A1 := 3*λ = 0.110429  # Расчёт размеров рупора
B1 := 2*λ = 0.0736196
Given
20*log((1 + cos(φ_2))/2*sin(π*B1/λ*sin(0.8*φ_2))/(π*B1/λ*sin(0.8*φ_2))) == -10
V := Find(B1)
V = 0.0764354  # Высота рупора
Given
20*log(0.15*π^2*(0.67 + cos(φ_2))*cos(π*A1/λ*sin(φ_2))/((π/2)^2 - (π*A1/λ*sin(φ_2))^2)) == -10
F_э := F*((e + 1)/(e - 1)) = 1.76203
SH := Find(A1)
SH = 0.085067  # Ширина рупора
R_E := V^2/(2*λ) = 0.0793588  # Длина рупора в плоскости Е
R_H := R_E*(1 - 0.0141/(V + 0.0015))/(1 - 0.0300/(SH + 0.0015)) = 0.0994743  # Длина рупора в плоскости Н
h := R_H - (0.0285 + 0.0015)*R_H/(SH + 0.0015) = 0.0650012
# Расстояние от центра раскрыва до горловины рупора
h := R_E - (0.0126 + 0.0015)*R_E/(V + 0.0015) = 0.0650012
# Построение ДН рупора
u1_x(θ) := π*SH/λ*sin(θ)
u1_y(θ) := π*V/λ*sin(θ)
F_E(θ) := (1 + cos(θ))/2*sin(u1_y(θ))/u1_y(θ)
F_H(θ) := 0.15*π^2*(0.67 + cos(u1_x(θ)))*cos(u1_x(θ))/((π/2)^2 - u1_x(θ)^2)
F_HΣ(θ) := 20*log(|F_H(θ)|)
F_EΣ(θ) := 20*log(|F_E(θ)|)
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# Эквивиалентный параболоид
F_э := F*((e + 1)/(e - 1)) = 1.76203  # Фокусное расстояние эквивалентного зеркала
R := D_0/2 = 0.8  # Радиус эквивалентного зеркала
# Расчёт ДН облучателя
atan(V/(2*R_E))*180/π = 25.7146
α(r) := atan(r/R/(F_э/R - (r/R)^2*R/(4*F_э)))
# ДН облучателя в плоскости Е
F_E(r) := 0.5*(1 + cos(α(r)))*sin(π*V/λ*sin(0.8*α(r)))/(π*V/λ*sin(0.8*α(r)))
# ДН облучателя в плоскости Н
F_H(r) := 0.15*π^2*(0.67 + cos(α(r)))*cos(π*SH/λ*sin(α(r)))/((π/2)^2 - (π*SH/λ*sin(α(r)))^2)
# Усреднённое распределение амплитуд
A_ср(r) := (1 + cos(α(r)))/4*(F_E(r) + F_H(r))
# Функция, аппроксимирующая распределение амплитуд
# Подобранные параметры:
a_0 := 0.3
p := 1.4
A_а(r) := a_0 + (1 - a_0)*(1 - (r/R)^2)^p
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# Расчёт ДН антенны
# Обобщённая угловая координата
u(θ) := 2*π*R/λ*sin(θ)
# Лямбда-функции
n := 0 .. 10
Λ_n(θ) := 2^n*n!*Jn(1, u(θ))/u(θ)^n
Λ_1(θ) := 2^1*1!*Jn(1, u(θ))/u(θ)^1
Λ_3(θ) := 2^3*3!*Jn(3, u(θ))/u(θ)^3
E_Σ(θ) := a_0*Λ_1(θ) + (1 - a_0)*Λ_3(θ)
# ДН антенны
F_Σ(θ) := 20*log(|E_Σ(θ)|)
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# По графику:
1.0432 - (-1.0432) = 2.0864  # Ширина главного лепестка ДН по уровню половинной мощности (в градусах)
# -24.6 | УБЛ (в дБ)
