θ := -π, -π + 0.0001 .. π
G := 42  # Коэффициент усиления
x := 10
Given
9.96 + 20*log(x) - 3 == G
p := Find(x)
p = 56.4937  # Отношение диаметра главного зеркала к длине
c := 3*10^8
ν := 8.15*10^9
λ := c/ν = 0.0368098
D_0 := λ*p = 2.07952  # Диаметр главного зеркала
D_0 := 2.2  # Стандартный размер
ψ_0 := 60*π/180
φ_2 := 9.565*π/180
F := 0.25*D_0*cot(ψ_0/2) = 0.952628  # Фокусное расстояние главного зеркала
e := sin((ψ_0 + φ_2)/2)/sin((ψ_0 - φ_2)/2) = 1.33894
d_0 := 15*λ = 0.552147  # Диаметр малого зеркала
f := d_0/4*cos((ψ_0 + φ_2)/2)/(sin(ψ_0/2)*cos(φ_2/2)) = 0.227538
# Фокусное расстояние малого зеркала
(e + 1)*d_0/(4*(e - 1)) = 0.952559
a := d_0/4*(1/sin(φ_2) - 1/sin(ψ_0)) = 0.671323
2*a = 1.34265  # Расстояние между вершинами гипербалоида
C := d_0/4*sin(ψ_0 + φ_2)/(sin(ψ_0)*sin(φ_2)) = 0.898861
2*C = 1.79772  # Расстояние между фокусами гипербалоида
ρ_0 := f*|(1 + e)/(1 - e)|
ρ_0 = 1.57018  # Расстояние от рупора до малого зеркала
0.571 + 2*C = 2.36872
φ_1 := 30*π/180
Given
tan(φ_1/2) == ((e - 1)/(e + 1))^2
z := 180/π*Find(φ_1) → 7.55866589782/π = 2.406  # Угол облучения источником краёв затенённой области раскрыва
# Проверка полученных результатов
4*F/d_0 = 6.90126
(e + 1)/(e - 1) = 6.90076
4*F = 3.81051
D_0*cot(ψ_0/2) = 3.81051
d_0/D_0 = 0.250976
(e - 1)/(e + 1)*cot(ψ_0/2) = 0.250994
# В соответствии с геометрией гиперболы: 2C = 2a + 2f
2*C = 1.79772
2*a + 2*f = 1.79772
# Эксцентриситет гиперболы: e = C/a >=1
e = 1.33894
C/a = 1.33894
# Расчёт размеров рупора
B1 := 10
Given
20*log((1 + cos(φ_2))/2*sin(π*B1/λ*sin(0.8*φ_2))/(π*B1/λ*sin(0.8*φ_2))) == -10
B := Find(B1)  # error: Эта переменная не определена.
V := 0.088  # Высота рупора
A1 := 10
Given
20*log(0.15*π^2*(0.67 + cos(φ_2))*cos(π*A1/λ*sin(φ_2))/((π/2)^2 - (π*A1/λ*sin(φ_2))^2)) == -10
A := Find(A1)  # error: Эта переменная не определена.
SH := 0.060  # Ширина рупора
R_E := V^2/(2*λ) = 0.105189  # Длина рупора в плоскости Е
R_H := R_E*(1 - 0.0141/(V + 0.0015))/(1 - 0.0300/(SH + 0.0015)) = 0.173015  # Длина рупора в плоскости Н
h := R_H - (0.0285 + 0.0015)*R_H/(SH + 0.0015) = 0.0886176
# Расстояние от центра раскрыва до горловины рупора
h := R_E - (0.0126 + 0.0015)*R_E/(V + 0.0015) = 0.0886176
# Построение ДН рупора
u1_x(θ) := π*SH/λ*sin(θ)
u1_y(θ) := π*V/λ*sin(θ)
F_E(θ) := (1 + cos(θ))/2*sin(u1_y(θ))/u1_y(θ)
F_H(θ) := 0.15*π^2*(0.67 + cos(u1_x(θ)))*cos(u1_x(θ))/((π/2)^2 - u1_x(θ)^2)
F_HΣ(θ) := 20*log(|F_H(θ)|)
F_EΣ(θ) := 20*log(|F_E(θ)|)
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# Эквивиалентный параболоид
F_э := F*((e + 1)/(e - 1)) = 6.57385  # Фокусное расстояние эквивалентного зеркала
R := D_0/2 = 1.1  # Радиус эквивалентного зеркала
# Расчёт ДН облучателя
α(r) := atan(r/R/(F_э/R - (r/R)^2*R/(4*F_э)))
# ДН облучателя в плоскости Е
F_E(r) := 0.5*(1 + cos(α(r)))*sin(π*V/λ*sin(0.8*α(r)))/(π*V/λ*sin(0.8*α(r)))
# ДН облучателя в плоскости Н
F_H(r) := 0.15*π^2*(0.67 + cos(α(r)))*cos(π*SH/λ*sin(α(r)))/((π/2)^2 - (π*SH/λ*sin(α(r)))^2)
# Усреднённое распределение амплитуд
A_ср(r) := (1 + cos(α(r)))/4*(F_E(r) + F_H(r))
# Функция, аппроксимирующая распределение амплитуд
# Подобранные параметры:
a_0 := 0.67
p := 1.2
A_а(r) := a_0 + (1 - a_0)*(1 - (r/R)^2)^p
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# Расчёт ДН антенны
# Обобщённая угловая координата
u(θ) := 2*π*R/λ*sin(θ)
# Лямбда-функции
n := 0 .. 10
Λ_n(θ) := 2^n*n!*Jn(1, u(θ))/u(θ)^n
Λ_1(θ) := 2^1*1!*Jn(1, u(θ))/u(θ)^1
Λ_3(θ) := 2^3*3!*Jn(3, u(θ))/u(θ)^3
E_Σ(θ) := a_0*Λ_1(θ) + (1 - a_0)*Λ_3(θ)
# ДН антенны
F_Σ(θ) := 20*log(|E_Σ(θ)|)
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# По графику:
1.0432 - (-1.0432) = 2.0864  # Ширина главного лепестка ДН по уровню половинной мощности (в градусах)
# -24.6 | УБЛ (в дБ)
