G := 39  # Коэффициент усиления
x := 10
solve block
    # constraints
    9.96 + 20*log(x) - 3 == G
    # solver
    p := Find(x)
end solve block
p = 39.9945  # Отношение диаметра главного зеркала к длине
c := 3*10^8
ν := 8.15*10^9
λ := c/ν = 0.0368098
D_0 := λ*p = 1.47219  # Диаметр главного зеркала
D_0 := 1.500
ψ_0 := 85*π/180
φ_2 := 18*π/180
F := 0.25*D_0*cot(ψ_0/2) = 0.409241  # Фокусное расстояние главного зеркала
e := sin((ψ_0 + φ_2)/2)/sin((ψ_0 - φ_2)/2) = 1.41793  # Эксцентриситет
d_0 := D_0*(e - 1)/(e + 1)*cot(ψ_0/2) = 0.282943
# Диаметр малого зеркала
f := d_0/4*cos((ψ_0 + φ_2)/2)/(sin(ψ_0/2)*cos(φ_2/2)) = 0.0659911  # Фокусное расстояние малого зеркала
a := d_0/4*(1/sin(φ_2) - 1/sin(ψ_0)) = 0.1579
2*a = 0.315799  # Расстояние между вершинами гипербалоида
C := d_0/4*sin(ψ_0 + φ_2)/(sin(ψ_0)*sin(φ_2)) = 0.223891
2*C = 0.447782  # Расстояние между фокусами гипербалоида
φ_1 := 30*π/180
solve block
    # constraints
    tan(φ_1/2) == ((e - 1)/(e + 1))^2
    z := 180/π*Find(φ_1) → 10.7521036852/π = 3.4225
end solve block
# Угол облучения источником краёв затенённой области раскрыва
# Проверка полученных результатов
4*F/d_0 = 5.78549
(e + 1)/(e - 1) = 5.78549
4*F = 1.63696
D_0*cot(ψ_0/2) = 1.63696
d_0/D_0 = 0.188629
(e - 1)/(e + 1)*cot(ψ_0/2) = 0.188629
# В соответствии с геометрией гиперболы: 2C = 2a + 2f
2*C = 0.447782
2*a + 2*f = 0.447782
# Эксцентриситет гиперболы: e = C/a >=1
e = 1.41793
C/a = 1.41793
# Проверка волновода
A := 0.0285
λ = 0.0368098
B := 0.0126
λ_кр := 2*A = 0.057  # Таким образом,  λ < λ_кр
A1 := 3*λ = 0.110429
B1 := 2*λ = 0.0736196  # Опорные значения (неверные)
# Расчёт размеров рупора
u_x := π*A1/λ*sin(φ_2)
u_y := π*B1/λ*sin(φ_2)
# Обобщённые угловые координаты
F_E := (1 + cos(φ_2))/2*sin(u_y)/u_y
# ДН рупора в плоскости Е
F_H := (π/2)^2*(1 + cos(φ_2))/2*cos(u_x)/((π/2)^2 - u_x^2)
# ДН рупора в плоскости Н
b1 := 10
λ := 0.037
φ_2 := 8*π/180
solve block
    # constraints
    20*log((1 + cos(φ_2))/2*sin(π*B1/λ*sin(φ_2))/(π*B1/λ*sin(φ_2))) == -10
    # solver
    B := Find(B1)
end solve block
# Высота рупора
B = 0.195904
A1 := 0.05
φ_2 := 8*π/180
λ := 0.037
solve block
    # constraints
    20*log((π/2)^2*(1 + cos(φ_2))/2*cos(π*A1/λ*sin(φ_2))/((π/2)^2 - (π*A1/λ*sin(φ_2))^2)) == -10
    # solver
    A := Find(A1)
end solve block
A = 0.270536  # Ширина рупора
# Эквивиалентный параболоид
L := 195
A := 271
cos(45*π/180) = 0.707107
F_э := F*((e + 1)/(e - 1)) = 2.36766  # Фокусное расстояние эквивалентного зеркала
a := 19
R := D_0/2 = 0.75  # Радиус эквивалентного зеркала
al := atan((A/2 - a/2)/L) = 0.573667
u_y(r) := π*B/λ*sin(r)
360/37*(L/cos(al) - L) - 360 = 1.61405
al*180/π = 32.8687
# Расчёт ДН облучателя
u_x(r) := π*A/λ*sin(r)
# ДН облучателя в плоскости Е
α(r) := atan(r/R/(F_э/R - (r/R)^2*R/(4*F_э)))
# ДН облучателя в плоскости Н
F_E(r) := 0.5*(1 + cos(α(r)))*sin(π*B/λ*sin(0.8*α(r)))/(π*B/λ*sin(0.8*α(r)))
α1 := 180/π*α(R)
α1 = 18
x(r) := 20*log(|F_E(r*π/180)|, 10)
# [plot: x(r) vs r]
F_H(r) := 0.15*π^2*(0.67 + cos(α(r)))*cos(π*A/λ*sin(α(r)))/((π/2)^2 - (π*A/λ*sin(α(r)))^2)
y(r) := 20*log(|F_H(r*π/180)|, 10)
F
# Усреднённое распределение амплитуд
# Функция, аппроксимирующая распределение амплитуд
# Подобранные параметры:
a_0 := 0.43
p := 1.35
A_ср(r) := (1 + cos(α(r)))/4*(F_H(r) + F_E(r))
A_а(r) := a_0 + (1 - a_0)*(1 - (r/R)^2)^p
# [plot: A_ср(r), A_а(r) vs r/R]
# [plot: y(r) vs r]
# Расчёт ДН антенны
# Обобщённая угловая координата
u(θ) := 2*π*R/λ*sin(θ)
# Лямбда-функции
n := 0 .. 10
Λ_n(θ) := 2^n*n!*Jn(1, u(θ))/u(θ)^n
Λ_1(θ) := 2^1*1!*Jn(1, u(θ))/u(θ)^1
Λ_2(θ) := 2^3*3!*Jn(3, u(θ))/u(θ)^3
E_Σ(θ) := a_0*Λ_1(θ) + (1 - a_0)*Λ_2(θ)
F_Σ(θ) := 20*log(|E_Σ(θ)|)
# ДН суммарного канала
# [plot: F_Σ(θ) vs θ*180/π]
v := (1 - a_0)*(2*p + 1)/(p + 1)^2 + a_0 = 0.811892
D := 4*π*π*R^2/λ^2*v = 13169.7
θ_0.5 := 0.870*2 = 1.74
УБЛ := -31.679
