c := 3*10^8
G := 39
dn := 7.9
k := -3
dv := 8.4
a := 19
φ0 := 80*π/180
b := 9.5
φ2 := 8*π/180
f := (dn + dv)/2 = 8.15
λ := c/(f*10^9)*1000 = 36.8098
D0 := λ*10^((G - 9.96 - k)/20) = 1472.19
D0 := 1500
GP := 9.96 + 20*log(D0/λ) + k = 39.1626
GP - G = 0.162552
ex := sin((φ0 + φ2)/2)/sin((φ0 - φ2)/2) = 1.18182
d0 := D0*(ex - 1)/(ex + 1)*cot(φ0/2) = 148.973
F := (ex + 1)*d0/(4*(ex - 1)) = 446.908
f := d0*cos((φ0 + φ2)/2)/(4*sin(φ0/2)*cos(φ2/2)) = 41.7805
Fe := F*(ex + 1)/(ex - 1) = 5362.75
B := 195
A := 269
ux(θ) := π*A/λ*sin(θ)
uy(θ) := π*B/λ*sin(θ)
FE(θ) := (1 + cos(θ))*sin(uy(θ))/(2*uy(θ))
x(θ) := 20*log(|FE(θ*π/180)|, 10)
# [plot: x(θ) vs θ]
L := 33
# Угол раскрыва в E-полоскости
α := atan((A/2 - a/2)/L)*180/π = 75.2113
360/λ*(L/cos(α*π/180) - L) - 360 = 581.644  # Величина фазового набега
