θ := -π, -π + 0.0001 .. π
G := 39  # Коэффициент усиления
x := 10
solve block
    # constraints
    9.96 + 20*log(x) - 3 == G
    # solver
    p := Find(x)
end solve block
p = 39.9945  # Отношение диаметра главного зеркала к длине
c := 3*10^8
ν := 8.15*10^9
λ := c/ν = 0.0368098
D_0 := λ*p = 1.47219  # Диаметр главного зеркала
D_0 := 1.5
ψ_0 := 85*π/180
φ_2 := 18*π/180
F := 0.25*D_0*cot(ψ_0/2) = 0.409241  # Фокусное расстояние главного зеркала
e := sin((ψ_0 + φ_2)/2)/sin((ψ_0 - φ_2)/2) = 1.41793
d_0 := 6*λ = 0.220859  # Диаметр малого зеркала
f := d_0/4*cos((ψ_0 + φ_2)/2)/(sin(ψ_0/2)*cos(φ_2/2)) = 0.0515111  # Фокусное расстояние малого зеркала
a := d_0/4*(1/sin(φ_2) - 1/sin(ψ_0)) = 0.123253
2*a = 0.246506  # Расстояние между вершинами гипербалоида
C := d_0/4*sin(ψ_0 + φ_2)/(sin(ψ_0)*sin(φ_2)) = 0.174764
2*C = 0.349528  # Расстояние между фокусами гипербалоида
φ_1 := 30*π/180
solve block
    # constraints
    tan(φ_1/2) == ((e - 1)/(e + 1))^2
    z := 180/π*Find(φ_1) → 10.7521036852/π = 3.4225
end solve block
# Угол облучения источником краёв затенённой области раскрыва
# Проверка полученных результатов
4*F/d_0 = 7.4118
(e + 1)/(e - 1) = 5.78549
4*F = 1.63696
D_0*cot(ψ_0/2) = 1.63696
d_0/D_0 = 0.147239
(e - 1)/(e + 1)*cot(ψ_0/2) = 0.188629
# В соответствии с геометрией гиперболы: 2C = 2a + 2f
2*C = 0.349528
2*a + 2*f = 0.349528
# Эксцентриситет гиперболы: e = C/a >=1
e = 1.41793
C/a = 1.41793
# Проверка волновода
A := 0.0285
λ = 0.0368098
B := 0.0126
λ_кр := 2*A = 0.057  # Таким образом,  λ < λ_кр
A1 := 3*λ = 0.110429
B1 := 2*λ = 0.0736196  # Опорные значения (неверные)
# Расчёт размеров рупора
u_x := π*A1/λ*sin(φ_2)
u_y := π*B1/λ*sin(φ_2)
# Обобщённые угловые координаты
F_E := (1 + cos(φ_2))/2*sin(u_y)/u_y
# ДН рупора в плоскости Е
F_H := (π/2)^2*(1 + cos(φ_2))/2*cos(u_x)/((π/2)^2 - u_x^2)
# ДН рупора в плоскости Н
b1 := 10
solve block
    # constraints
    20*log((1 + cos(φ_2))/2*sin(π*B1/λ*sin(φ_2))/(π*B1/λ*sin(φ_2))) == -10
    # solver
    V := Find(B1)
end solve block
V = 0.0872138  # Высота рупора
a1 := 10
solve block
    # constraints
    20*log((π/2)^2*(1 + cos(φ_2))/2*cos(π*A1/λ*sin(φ_2))/((π/2)^2 - (π*A1/λ*sin(φ_2))^2)) == -10
    # solver
    SH := Find(A1)
end solve block
SH = 0.120352  # Ширина рупора
# Эквивиалентный параболоид
F_э := F*((e + 1)/(e - 1)) = 2.36766  # Фокусное расстояние эквивалентного зеркала
R := D_0/2 = 0.75  # Радиус эквивалентного зеркала
# Расчёт ДН облучателя
α(r) := atan(r/R/(F_э/R - (r/R)^2*R/(4*F_э)))
α1 := 180/π*α(R)
α1 = 18
# ДН облучателя в плоскости Е
F_E(r) := 0.5*(1 + cos(α(r)))*sin(π*V/λ*sin(0.8*α(r)))/(π*V/λ*sin(0.8*α(r)))
# ДН облучателя в плоскости Н
F_H(r) := 0.15*π^2*(0.67 + cos(α(r)))*cos(π*SH/λ*sin(α(r)))/((π/2)^2 - (π*SH/λ*sin(α(r)))^2)
# Усреднённое распределение амплитуд
A_ср(r) := (1 + cos(α(r)))/4*(F_E(r) + F_H(r))
x(r) := 20*log(|F_E(r)*π/180|, 10)
# [plot: x(r) vs r]
# Функция, аппроксимирующая распределение амплитуд
# Подобранные параметры:
a_0 := 0.65
p := 1.5
A_а(r) := a_0 + (1 - a_0)*(1 - (r/R)^2)^p
# [plot: A_ср(r), A_а(r) vs r/R]
R = 0.75
# Расчёт ДН антенны
# Обобщённая угловая координата
u(θ) := 2*π*R/λ*sin(θ)
# Лямбда-функции
n := 0 .. 10
Λ_n(θ) := 2^n*n!*Jn(1, u(θ))/u(θ)^n
Λ_1(θ) := 2^1*1!*Jn(1, u(θ))/u(θ)^1
Λ_2(θ) := 2^3*3!*Jn(3, u(θ))/u(θ)^3
E_Σ(θ) := a_0*Λ_1(θ) + (1 - a_0)*Λ_2(θ)
1.037*2 = 2.074
# ДН суммарного канала
F_Σ(θ) := 20*log(|E_Σ(θ)|)
# [plot: F_Σ(θ) vs θ*180/π]
