θ := -π, -π + 0.0001 .. π
G := 39  # Коэффициент усиления
x := 10
Given
9.96 + 20*log(x) - 3 == G
p := Find(x)
p = 39.9945  # Отношение диаметра главного зеркала к длине
c := 3*10^8
ν := 8.15*10^9
λ := c/ν = 0.0368098
D_0 := λ*p = 1.47219  # Диаметр главного зеркала
D_0 := 1.6
ψ_0 := 80*π/180
φ_2 := 8*π/180
F := 0.25*D_0*cot(ψ_0/2) = 0.476701  # Фокусное расстояние главного зеркала
e := sin((ψ_0 + φ_2)/2)/sin((ψ_0 - φ_2)/2) = 1.18182
9.96 + 20*log(D_0/λ) - 3 = 39.7231
# Диаметр малого зеркала
D_0*(e - 1)/(e + 1)*cot(ψ_0/2) = 0.158905
d_0 := 8*λ = 0.294479
(e + 1)*d_0/(4*(e - 1)) = 0.883412
f := d_0/4*cos((ψ_0 + φ_2)/2)/(sin(ψ_0/2)*cos(φ_2/2)) = 0.0825885  # Фокусное расстояние малого зеркала
a := d_0/4*(1/sin(φ_2) - 1/sin(ψ_0)) = 0.454224
2*a = 0.908447  # Расстояние между вершинами гипербалоида
C := d_0/4*sin(ψ_0 + φ_2)/(sin(ψ_0)*sin(φ_2)) = 0.536812
Fe := F*(e + 1)/(e - 1) = 5.72027
2*C = 1.07362  # Расстояние между фокусами гипербалоида
φ_1 := 30*π/180
Given
tan(φ_1/2) == ((e - 1)/(e + 1))^2
В
z := 180/π*Find(φ_1) → 2.50009156993/π = 0.795804  # Угол облучения источником краёв затенённой области раскрыва
# Проверка полученных результатов
4*F/d_0 = 6.47519
(e + 1)/(e - 1) = 11.9997
4*F = 1.90681
D_0*cot(ψ_0/2) = 1.90681
d_0/D_0 = 0.184049
(e - 1)/(e + 1)*cot(ψ_0/2) = 0.0993154
# В соответствии с геометрией гиперболы: 2C = 2a + 2f
2*C = 1.07362
2*a + 2*f = 1.07362
# Эксцентриситет гиперболы: e = C/a >=1
e = 1.18182
C/a = 1.18182
A1 := 3*λ = 0.110429
B1 := 2*λ = 0.0736196  # Опорные значения (неверные)
# Расчёт размеров рупора
u_x(r) := π*0.269/λ*sin(r)
u_y(r) := π*0.195/λ*sin(r)  # Обобщённые угловые координаты
F_E := (1 + cos(φ_2))/2*sin(u_y)/u_y  # error: Значение должно быть скалярным.  # ДН рупора в плоскости Е
E(r) := (1 - (2*r/D_0)^2)*0.04258
F_H(r) := (π/2)^2*(1 + cos(φ_2))/2*cos(u_x(r))/((π/2)^2 - u_x(r)^2)  # ДН рупора в плоскости Н
y(r) := 20*log(|F_H(r*π/180)|, 10)
b1 := 10
Given  # Высота рупора
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20*log((1 + cos(φ_2))/2*sin(π*B1/λ*sin(φ_2))/(π*B1/λ*sin(φ_2))) == -10
V := Find(B1)
V = 0.194897
a1 := 10  # Ширина рупора
Given
20*log((π/2)^2*(1 + cos(φ_2))/2*cos(π*A1/λ*sin(φ_2))/((π/2)^2 - (π*A1/λ*sin(φ_2))^2)) == -10
SH := Find(A1)
SH = 0.269146
aa := 19*10^-3
L := 0.195
λ = 0.0368098
# Эквивиалентный параболоид
aaa := atan((SH/2 - aa/2)/L) = 0.570305
F_э := F*((e + 1)/(e - 1)) = 5.72027  # Фокусное расстояние эквивалентного зеркала
360/λ*(L/cos(aaa) - L) - 360 = -1.4258
R := D_0/2 = 0.8  # Радиус эквивалентного зеркала
# Расчёт ДН облучателя
α(r) := atan(r/R/(F_э/R - (r/R)^2*R/(4*F_э)))
α1 := 180/π*α(R)
α1 = 8
# ДН облучателя в плоскости Е
F_E(r) := 0.5*(1 + cos(α(r)))*sin(π*V/λ*sin(0.8*α(r)))/(π*V/λ*sin(0.8*α(r)))
# ДН облучателя в плоскости Н
F_H(r) := 0.15*π^2*(0.67 + cos(α(r)))*cos(π*SH/λ*sin(α(r)))/((π/2)^2 - (π*SH/λ*sin(α(r)))^2)
# Усреднённое распределение амплитуд
A_ср(r) := (1 + cos(α(r)))/4*(F_E(r) + F_H(r))
# Подобранные параметры:
# Функция, аппроксимирующая распределение амплитуд
a_0 := 0.33
p := 1
A_а(r) := a_0 + (1 - a_0)*(1 - (r/R)^2)^p
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# Расчёт ДН антенны
u(θ) := 2*π*R/λ*sin(θ)
# Обобщённая угловая координата
n := 0 .. 10
# Лямбда-функции
Λ_2(θ) := 2^2*2!*Jn(2, u(θ))/u(θ)^2
Λ_n(θ) := 2^n*n!*Jn(1, u(θ))/u(θ)^n
Λ_1(θ) := 2^1*1!*Jn(1, u(θ))/u(θ)^1
Λ_4(θ) := 2^4*4!*Jn(4, u(θ))/u(θ)^4
Λ_3(θ) := 2^3*3!*Jn(3, u(θ))/u(θ)^3
Λ_5(θ) := 2^5*5!*Jn(5, u(θ))/u(θ)^5
E_Σ(θ) := a_0*Λ_1(θ) + (1 - a_0)*Λ_2(θ)
E_Σ(θ) := a_0*Λ_1(θ) + (1 - a_0)*Λ_2(θ)
1.26*λ/D_0 = 0.0289877
# ДН суммарного канала
F_Σ(θ) := 20*log(|E_Σ(θ)|)
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R := D_0/2 = 0.8
0.773*2 = 1.546
v := (1 - a_0)*(2*p + 1)/(p + 1)^2 + a_0 = 0.8325
D := 4*π*π*R^2/λ^2*v = 15523.8
